# Proiectarea unui convertor BUCK
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# 1. Parametri de intrare
# Tensiune de intrare :
V_in := 12 V
# Tensiune de iesire:
V_out := 5 V
# Curentul maxim la iesire:
I_out := 3 A
# Frecventa de comutatie:
f_sw := 100 kHz
# Eficienta propusa:
η := 1
# Riplu impus de curent prin bobina:
ΔI_L := 25%*I_out = 0.75 A
# Riplu impus de tensiune la iesirea convertorului:
ΔV_out := 1%*V_out = 0.05 V
# 2. Functii
η == P_out/P_in
P_out == η*Pin
P_in == P_out/η
η == eficienta
μH := 10^-6 H
T_sw := 1/f_sw
T_sw == T_on + T_off
V_L == L*di_L/dt
C_in == I_in*T_off/ΔV_in
μF := 10^-6 F
D_rc := V_out/V_in
I_in := V_out*I_out/(η*V_in)
I_Lmax := I_out + ΔI_L/2 = 3.375 A
T_on := D_rc*T_sw
D_rc := T_on/T_sw == T_on/(T_on + (T_sw - T_on)) == T_on/(T_on + T_off)  # error: This variable is undefined. Check that the label is set correctly.
I_Lmin := I_out - ΔI_L/2 = 2.625 A
I_Cmin := I_in - I_out + ΔI_C/2  # error: This variable is undefined. Check that the label is set correctly.
T_off := T_sw - T_on
I_Cmax := I_in + I_out + ΔI_C/2  # error: This variable is undefined. Check that the label is set correctly.
(x - x_A)/(x_B - x_A) == (y - y_A)/(y_B - y_A)
t/T_on == (I_L(t) - I_Lmin)/(I_Lmax - I_Lmin)
I_L(t) == t(I_Lmax - I_Lmin)/T_on + I_Lmin
(t - T_on)/(T_sw - T_on) == (I_L(t) - I_Lmax)/(I_Lmin - I_Lmax)
I_L(t) == (t - T_on)*(I_Lmin - I_Lmax)/(T_sw - T_on) + I_Lmax
# 2. Calculul Duratei Relative de Conductie
D_rc == V_out/V_in  # De adaugat demonstratii formule!!!
D_rc := V_out/V_in = 0.416667
# 3. Selectarea Bobinei
L_buck == (V_in - V_out)*D_rc/(ΔI_L*f_sw)
# De adaugat demonstratii formule!!!
L_buck := (V_in - V_out)*D_rc/(ΔI_L*f_sw) = 38.8889 μH
# 2. Selectarea condensatorului de iesire
C_out == Tsw*ΔI_L/(ΔI_L*ΔV_out)
# De adaugat demonstratii formule!!!
C_out := ΔI_L/(8*ΔV_out*f_sw) = 18.75 μF
# 2. Selectarea condensatorului de iesire
# De adaugat demonstratii formule!!!
C_in == |((I_in - I_out + ΔI_L/2) + (I_in - I_out - ΔI_L/2))*D_rc/(2*5%*V_in*f_sw)|
C_in := |((I_in - I_out + ΔI_L/2) + (I_in - I_out - ΔI_L/2))*D_rc/(2*5%*V_in*f_sw)| = 12.1528 μF
I_L(t) :=
    if 0 < t < T_on
        t*(I_Lmax - I_Lmin)/T_on + I_Lmin
    if T_on < t < T_sw
        (t - T_on)*(I_Lmin - I_Lmax)/(T_sw - T_on) + I_Lmax
t := 0 μs, 0.01 μs .. 20 μs
if 0 < t < T_on
    □
# [plot: I_L(t) vs t]
